# AguaClara Water Treatment Plants
# Design References
# MathCAD dimension calculations:
# [reference: BasicInputs.xmcd]
# Uses BasicClientInputs when this is run by LabVIEW.
# Use BasicInputs to use the program in MathCAD
# Change the reference by
# - right clicking
# - select properties
# - reference tab
# - type in the correct file name
# [reference: ExpertInputs.xmcd]
# [reference: MathFunctions.xmcd]
# [reference: PipeDatabase.xmcd]
# [reference: FluidsFunctions.xmcd]
# [reference: SedimentationTank.xmcd]
# [reference: Flocculator.xmcd]
# [reference: LFOM.xmcd]
# [reference: LinearCdc.xmcd]
# [reference: ChemStorageTanks.xmcd]
# [reference: EntranceTank.xmcd]
# [reference: StackedRapidSandFilter.xmcd]
# [reference: DrainChannel.xmcd]
# [reference: MaterialsList.xmcd]
# AutoCAD drawing programs:
# Translators:
# These are the codes that take MathCAD outputs and create AutoCAD scripts that are used to draw the plant (formerly Basics)
# [reference: MtoATranslators.xmcd]
# The wrapped MtoA translator contains the functions that the user will want to access. These functions will draw pieces with full functionality - specifying the location, dimension, and orientation of the object. Also, it contains layer control and subtraction capabilities for grouped objects.
# [reference: MtoATranslatorsWrapped.xmcd]
# Plant Elements:
# These are all of the files that draw the fundamental parts of the plants (tees, elbows, tanks, pipes, etc)
# [reference: ChannelF.xmcd]
# [reference: PlumbingF.xmcd]
# [reference: TankF.xmcd]
# [reference: LaminaF.xmcd]
# [reference: StairsF.xmcd]
# [reference: DrainChannelF.xmcd]
# [reference: ManifoldF.xmcd]
# Specific Pieces:
# These are the codes that draw the bigger pieces of the plant (the sed tank, floc tank, etc)
# [reference: FlocculatorAC.xmcd]
# [reference: SedimentationTankAC.xmcd]
# [reference: EntranceTankAC.xmcd]
# [reference: ChemStockTanksAC.xmcd]
# [reference: StackedRapidSandFilterAC.xmcd]
# [reference: OperatorAccessAC.xmcd]
# [reference: DrainChannelAC.xmcd]
# Layouts:
# This file will execute at the very end to create multiple views of the entire plant in paperspace
# [reference: LayoutsAC.xmcd]
# Sedimentation
# Sed Tanks and Slopes:
N_SedTanks = 5
H_SedBetween =  # error: This variable is undefined.  # Distance from the top of the inlet manifold to the bottom of the ledge supporting the lamella frame
L_Sed = 3.88577 m
N_SedBays = 1  # Number of bays of inlet manifolds in each sed tank
# Length of the port through which water exits the inlet manifold
# Width of ferrous cement plates in whice one manifold port is cut
Q_SedBay = 3 L/s
# Sedimentation Tank Sludge Drain:
N_SedSludgeOrifices = 27  # per cell
Ti_SludgeDrain = 30 min  # Tank Drain time
W_SedSludge = 6.76664 cm  # Width of the sludge channel
B_SedSludgeOrifices = 10.4711 cm  # Distance center to center between drain orifices
# Depth of the sludge channel
H_SedSludge = 6.76664 cm
T_SedSludge =  # error
# Thickness of the plate topping the sludge channel
# through which drain holes are formed
T_SedSludge =  # error
W_SedDrainCover = 10.7666 cm
D_SedSludgeOrifice = 0.0092434 m  # Diameter of drain orifices
W_SedInletBottom =  # error
N_SedSludgeOrifices = 27
ND_SedSludgeValve =  # error
# Sedimentation Tank Dimensions:
Z_SedSludge = 0.0676664 m  # Height from 0 of the top of the sludge drain
# Height from 0 of the top of the inlet manifold
Z_SedSlopes =  # error  # Total tank wall height
W_Sed = 0.92 m
L_Sed = 3.88577 m  # Total tank length
# Inlet Channel:
HW_InletChannel =  # error  # Width of the drop chimneys connecting channel to sed inlet manifolds
W_InletChannel =  # error  # length of drop chimmneys
L_Channel =  # error
# per sed bay
N_SedInletPipes =  # error
H_InletChannel =  # error
# Sedimentation Tank Effluent Launder:
N_SedLaunderOrifices = 54  # Number of orifices per launder  # More Launder Dimensions
ND_SedLaunder = 4 in
Q_SedLaunderOrifices = 5.55556e-5 m^3/s
# Center to center launder spacing
L_SedLaunder = 2.86367 m
B_SedLaunderOrifices = 0.1 m
D_SedLaunderOrifice = 0.433071 in
# Exit Channel:
W_ExitChannel =  # error
H_ExitChannel =  # error
L_ExitChannel =  # error
H_PltWeir =  # error  # height of the weir carrying water to the distribution tank
HW_ExitChannel =  # error  # water height in exit channel from 0
# Lamella:
L_SedPlate = 0.609667 m  # center to center distance between lamella
B_SedPlate = 2.7 cm  # spacing between lamella
S_SedPlate = 2.5 cm
N_SedPlates = 91  # Number of Sed Plates per Sedimentation Tank Bay.
AN_SedPlate = 60 deg
V_SedC = 10.3521 m/day
L_SedActive = 2.83479 m
V_SedUp = 86.4 m/day
Z_SedLaunder = 1.74651 m
H_SedPlate =  # error
H_SedAbove =  # error  # Height of water needed above the lamella
N_SedPlates = 91
HW_Sed = 1.84756 m
H_Sed = 1.95724 m
Z_Mp =  # error
H_SedBayDivider =  # error
# Flocculator
# Look at Flocculator Positioning arrays
W_FlocChannel = 0.6 m
# Fill last channel with bafffles from last channel
ED_Floc = 10 mW/kg
# Fix port width to be based on energy dissipation in that channel
# Adjust spacing after the number of baffles per channel is known.
HW_FlocEnd = 1.84756 m
# Check the residence time of the flocculator should be at least 20minutes
X_FlocBaffles = [
    0.192899, 0.192899, 0.192899, 0.30415;
    0.367797, 0.367797, 0.367797, 0.482398;
    0.542696, 0.542696, 0.542696, 0.660647;
    0.717594, 0.717594, 0.717594, 0.838895;
    0.892493, 0.892493, 0.892493, 1.01714;
    1.06739, 1.06739, 1.06739, 1.19539;
    1.24229, 1.24229, 1.24229, 1.37364;
    1.41719, 1.41719, 1.41719, 1.55189;
    1.59209, 1.59209, 1.59209, 1.73014;
    1.76699, 1.76699, 1.76699, 1.90839;
    1.94188, 1.94188, 1.94188, 2.08663;
    2.11678, 2.11678, 2.11678, 2.26488;
    2.29168, 2.29168, 2.29168, 2.44313;
    2.46658, 2.46658, 2.46658, 2.62138;
    2.64148, 2.64148, 2.64148, 2.79963;
    2.81638, 2.81638, 2.81638, 2.97788;
    2.99127, 2.99127, 2.99127, 3.15612;
    3.16617, 3.16617, 3.16617, 3.33437;
    3.34107, 3.34107, 3.34107, 3.51262;
    3.51597, 3.51597, 3.51597, 3.69087;
    3.69087, 3.69087, 3.69087, 0
] m
L_FlocBaffles = [
    1.58822, 1.58822, 1.58822, 1.82201;
    1.82201, 1.82201, 1.82201, 1.58822;
    1.58822, 1.58822, 1.58822, 1.82201;
    1.82201, 1.82201, 1.82201, 1.58822;
    1.58822, 1.58822, 1.58822, 1.82201;
    1.82201, 1.82201, 1.82201, 1.58822;
    1.58822, 1.58822, 1.58822, 1.82201;
    1.82201, 1.82201, 1.82201, 1.58822;
    1.58822, 1.58822, 1.58822, 1.82201;
    1.82201, 1.82201, 1.82201, 1.58822;
    1.58822, 1.58822, 1.58822, 1.82201;
    1.82201, 1.82201, 1.82201, 1.58822;
    1.58822, 1.58822, 1.58822, 1.82201;
    1.82201, 1.82201, 1.82201, 1.58822;
    1.58822, 1.58822, 1.58822, 1.82201;
    1.82201, 1.82201, 1.82201, 1.58822;
    1.58822, 1.58822, 1.58822, 1.82201;
    1.82201, 1.82201, 1.82201, 1.58822;
    1.58822, 1.58822, 1.58822, 1.82201;
    1.82201, 1.82201, 1.82201, 1.58822;
    1.58822, 1.58822, 1.58822, 0
] m
Z_FlocBaffles = [
    0, 0, 0, 0.264373;
    0.259348, 0.259348, 0.259348, 0;
    0, 0, 0, 0.264373;
    0.259348, 0.259348, 0.259348, 0;
    0, 0, 0, 0.264373;
    0.259348, 0.259348, 0.259348, 0;
    0, 0, 0, 0.264373;
    0.259348, 0.259348, 0.259348, 0;
    0, 0, 0, 0.264373;
    0.259348, 0.259348, 0.259348, 0;
    0, 0, 0, 0.264373;
    0.259348, 0.259348, 0.259348, 0;
    0, 0, 0, 0.264373;
    0.259348, 0.259348, 0.259348, 0;
    0, 0, 0, 0.264373;
    0.259348, 0.259348, 0.259348, 0;
    0, 0, 0, 0.264373;
    0.259348, 0.259348, 0.259348, 0;
    0, 0, 0, 0.264373;
    0.259348, 0.259348, 0.259348, 0;
    0, 0, 0, 0
] m
N_FlocChannels = 4
L_FlocTank = 15.5431 m
HL_Floc = 18.3794 cm
HW_FlocStart = 2.03136 m
S_FlocBaffle = [17.2899; 17.2899; 17.2899; 17.6248] cm
B_FlocBaffle = [17.4899; 17.4899; 17.4899; 17.8248] cm
N_FlocChannelBaffles = [21; 21; 21; 20]
W_FlocPort = [0.172899; 0.172899; 0.172899; 0.183132] m
HL_FlocChannels = [4.69029; 4.69029; 4.69029; 4.30852] cm
L_FlocBaffleLower = 1.58822 m
L_FlocBaffleUpper = 1.82201 m
H_FlocPort = [0.6; 0.6; 0.6; 0.577448] m
Ti_Floc = 19.1445 min  # residence time of the flocculator
N_FlocBaffles = 83
# Materials List
N_Launders =  # error
L_LaunderPipeTotal =  # error
N_Valves = 5
N_LaunderCouplings =  # error
N_ValveCouplings = 5
N_SedPlatesTotal = 455
N_SedPlatesPerSheet = 6
N_SedPlateSheets = 76
# AutoCAD Scripts
AC_SedTank =  # no stored result
AC_EntranceTank =  # error
AC_FlocTank = [
    "-layer m FlocTank"; "c t 132,132,132"; "FlocTank"; "  "; "_-view o t _zoom w 0.16,5.19,0 -4.04577,8.36,2.13136 _box 0,5.35,0 -3.88577,8.2,2.13136 _box 0.15,5.2,-0.15 -4.03577,8.35,2.13136 _subtract 0.15,5.2,-0.15  0,5.35,0 "; "_box -4.03577,5.95,0 0.15,6.1,2.13136"; "-array l  R 3 1 0.75"; "-group c FlocTank y "; "all "; "-layer s 0"
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]
AC_ChemTanks = [
    "-layer m CoagTanks"; "c t 132,132,132"; "CoagTanks"; "  "; "_-view o t"; "_zoom w -5.66152,10.53215,1.71979 -4.71712,11.47655,2.81159"; "_cylinder -5.18932,11.00435,2.80159 0.4622 c -6.26112,11.00435,2.80159"; "rotate3d l  y -5.18932,11.00435,2.80159 90"; "-group c CoagTanks y "; "all "
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]
AC_OperatorAccess = [
    "-layer m OpCoagplatformCon"; "c t 132,132,132"; "OpCoagplatformCon"; "  "; "_-view o f"; "_pline"; "-7.49032,2.80159"; "-7.19032,2.80159"; "-7.19032,2.60954"; "-6.89032,2.60954"
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]
AC_DrainChannel = [
    "-layer m DrainChannel2"; "c t 214,214,214"; "DrainChannel2"; "  "; "3dpoly"; "0,-0.15,-0.15"; "0,-0.15,-0.59544"; "0,1.15,-0.59544"; "0,1.15,-0.15"; "0,-0.15,-0.15 "
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]
AC_Layout = [
    "laythw"; "-layout t AguaClara 0"; "View"; "layout d Layout1"; " d Layout2"; "layout r View"; "TopView"; "layout s TopView"; ".ms"; "z o all "
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]
AC_Filter =  # no stored result
